*Heading
** Job name: TwoGrains Model name: Tomography_12212012
** Generated by: Abaqus/CAE 6.11-1
*Preprint, echo=NO, model=NO, history=NO, contact=NO
**
** PARTS
**
*Part, name=Grain3
*Node
  98155,   7.53151131,   8.29307938,   0.99699086
  98935,   7.54703999,   8.28299427,   1.00326538
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*Element, type=C3D4
     56, 102810, 102813, 102060, 103561
     90, 118646, 118649, 118620, 118623
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*Elset, elset=Grain3
     56,     90,    127,    206,    331,    368
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*Nset, nset=Grain3_Nodes
  98155,  98935,  98936,  98942,  98943,  98945
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** Section: Grain
*Solid Section, elset=Grain3, material=Sand
,
*End Part
**
*Part, name=Grain4
*Node
  37455,   7.52635002,   8.36133385,  0.536751032
  37456,   7.51926804,   8.38713932,   0.53808403
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*Element, type=C3D4
    334,  52527,  54292,  52526, 118766
    493,  52512,  54270,  54274, 118877
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*Elset, elset=Grain4
    334,    493,    515,    521,    522,    622
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*Nset, nset=Grain4_Nodes
  37455,  37456,  37457,  37458,  37460,  37461
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** Section: Grain
*Solid Section, elset=Grain4, material=Sand
,
*End Part
**
*Part, name=Plate
*Node
      1,           1.,           1.,  0.100000001
      2,           1.,  0.899999976,  0.100000001
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*Element, type=C3D8R
  1,  23,  24,  35,  34,   1,   2,  13,  12
  2,  24,  25,  36,  35,   2,   3,  14,  13
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*Nset, nset=_PickedSet3, internal, generate
   1,  242,    1
*Elset, elset=_PickedSet3, internal, generate
   1,  100,    1
** Section: Grain
*Solid Section, elset=_PickedSet3, material=Sand
,
*End Part
**
**
** ASSEMBLY
**
*Assembly, name=Assembly
**
*Instance, name=Grain3-1, part=Grain3
       -7.05,         -7.9,    -0.435751
*End Instance
**
*Instance, name=Grain4-1, part=Grain4
       -7.05,         -7.9,    -0.435751
*End Instance
**
*Instance, name=Plate-1, part=Plate
*End Instance
**
*Instance, name=Plate-2, part=Plate
          0.,           0.,         0.93
*End Instance
**
*Nset, nset=_PickedSet15, internal, instance=Plate-1
  12,  13,  14,  15,  16,  17
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*Elset, elset=_PickedSet15, internal, instance=Plate-1, generate
   1,  100,    1
*Nset, nset=_PickedSet16, internal, instance=Plate-2
   1,   2,   3,   4,   5,   6
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*Elset, elset=_PickedSet16, internal, instance=Plate-2, generate
   1,  100,    1
*End Assembly
*Amplitude, name=Amp-1
             0.,              0.,              1.,              1.
**
** MATERIALS
**
*Material, name=Rigid
*Density
 2e-06,
*Elastic
8000., 0.3
*Material, name=Sand
*Density
 2e-06,
*Elastic
80., 0.3
**
** INTERACTION PROPERTIES
**
*Surface Interaction, name=IntProp-1
*Friction
0.,
*Surface Behavior, pressure-overclosure=HARD
**
** INTERACTIONS
**
** Interaction: Interaction
*Contact, op=NEW
*Contact Inclusions, ALL EXTERIOR
*Contact Property Assignment
 ,  , IntProp-1
** ----------------------------------------------------------------
**
** STEP: Step-1
**
*Step, name=Step-1
*Dynamic, Explicit
, 1.
*Bulk Viscosity
0.06, 1.2
**
** BOUNDARY CONDITIONS
**
** Name: BottomPlate Type: Displacement/Rotation
*Boundary
_PickedSet15, 1, 1
_PickedSet15, 2, 2
_PickedSet15, 3, 3
_PickedSet15, 4, 4
_PickedSet15, 5, 5
_PickedSet15, 6, 6
** Name: TopPlate Type: Displacement/Rotation
*Boundary, amplitude=Amp-1
_PickedSet16, 1, 1
_PickedSet16, 2, 2
_PickedSet16, 3, 3, -0.05
_PickedSet16, 4, 4
_PickedSet16, 5, 5
_PickedSet16, 6, 6
**
** OUTPUT REQUESTS
**
*Restart, write, number interval=1, time marks=NO
**
** FIELD OUTPUT: F-Output-1
**
*Output, field, variable=PRESELECT
**
** HISTORY OUTPUT: H-Output-1
**
*Output, history, variable=PRESELECT
*End Step
